Uvcc := 24
Txx := 0.03
P24 := 4*209 = 836
Vxx := 2000
Vxx_r := π*Vxx/30 = 209.44
Pxx := Txx*Vxx_r = 6.28319
Ixx := Pxx/Uvcc = 0.261799
ω24n := 750/4 = 187.5
Tmax := 4
Vtmax := 1790
Vtmax_r := π*Vtmax/30 = 187.448
Ptmax := Tmax*Vtmax_r = 749.793
Itmax := Ptmax/Uvcc = 31.2414
# Моментная зависимость | Токовая зависимость
Mt := (Tmax - Txx)/(Vtmax - Vxx) = -0.0189048
Mi := (Itmax - Ixx)/(Tmax - Txx) = 7.80342
Bt := Txx - Mt*Vxx = 37.8395
Bi := Ixx - Mi*Txx = 0.0276967
Tv(V) := Mt*V + Bt
I(T) := Mi*T + Bi
VText := Vtmax
I(Tv(VText)) = 31.2414
37*4*5 = 740
