Nz := 19
Tk := 28
Nhlim1 := 14*10^6
ny := 5
ωk := 18.5
Znmax := 2.6
Tpm := 250
Nhlim2 := 11*10^6
nm := 1
ωpm := 0.3
Sh := 1.2
nd := 1
nk := 30*ωk/3.14 = 176.752
npm := 30*ωpm/3.14 = 2.86624
Lh := ny*365*nm*8*nd = 14600
Nhek := 60*nk*Lh = 154834395
Nhe_pm := 60*npm*Lh = 2510828
Zk := nthroot(Nhlim1/Nhek, 6) = 0.669952
Zpm := nthroot(Nhlim1/Nhe_pm, 6) = 1.33163
σ_hk := 0.9*640*Zk/Sh = 321.577
σ_hpm := 0.9*640*Zpm/Sh = 639.185
d_kon_k := 101*nthroot(Tk*1.3*1*10^3/(0.85*σ_hk^2*(1 - 0.3)*0.3), 3) = 126.654
d_chil_k := 77*nthroot(Tk*1.3*1*10^3/(0.8*σ_hk^2), 3) = 58.565
d_chin_pm := 77*nthroot(Tpm*1.3*1*10^3/(0.8*σ_hpm^2), 3) = 76.8548
m_kon_k := d_kon_k/Nz = 6.66601
