j := sqrt(-1)
F(ω) := 7.8*10^-8*(j*ω)^3 + 0.0013*(j*ω)^2 + 0.063*(j*ω) + 0.928
ω := 0, 0.1 .. 1000
R(ω) := Re(F(ω))
I(ω) := Im(F(ω))
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F1(ω) := 1.3*10^-6*(j*ω)^4 + 0.001*(j*ω)^3 + 0.138*(j*ω)^2 + 4.22*(j*ω) + 75.6
ω1 := 0, 0.1 .. 500
R1(ω1) := Re(F1(ω1))
I1(ω1) := Im(F1(ω1))
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